Clear

New Object=Circuit.TNB_DUMA BasekV=33 pu=1.0 Angle=0 phases=3 bus1=PPU_DUMA_33kV BaseFreq=50

! ATTACHING transformer and lines files

// Redirect transformer.dss
// Redirect lines.dss

Redirect tx_sectionalized.dss
Redirect lines_sectionalized.dss

// Redirect tx_contingency.dss

// ! ATTACHING loads files

// Redirect no_load.dss
Redirect peak_loads.dss

! PV System Integration

// Redirect pv0pc.dss
// Redirect pv20pc.dss
// Redirect pv40pc.dss
// Redirect pv60pc.dss
// Redirect pv80pc.dss
// Redirect pv100pc.dss

// Redirect pv120pc.dss
// Redirect pv140pc.dss
// Redirect pv160pc.dss
// Redirect pv180pc.dss
// Redirect pv200pc.dss
Redirect pvtestpc.dss


// Set Voltagebases=[33 11.3]
Set DefaultBaseFrequency=50

// Set controlmode=static
// Set mode=snapshot
// Set maxiterations=100

// calcVoltagebases
// solve
